OpenVSP model (file version 5), 22 components.
Geometry view with OpenVSP parameter names; values to 6 digits, angles in degrees, lengths in the model's unit.
Overall bounding box: X_Min=-0.70095 X_Len=30.0699 Y_Min=-17.9999 Y_Len=35.9998 Z_Min=-5.62501 Z_Len=11.173

Fuselage "FuselageGeom"
  location (X Y Z) 0 0 0, rotation 0 0 0
  bounding box size 27.1667 4.4767 6.0014
  mass: Density=2.7961 Shell_Flag=0 Mass_Area=1 Mass_Prior=0
  Design: Length=27.1667
  cross sections:
    n  XLocPercent  YLocPercent  ZLocPercent  shape
    0  0            0            0            rounded rectangle RoundRectXSec_Radius=0.2 RoundedRect_Height=1.4595 RoundedRect_Width=2.3583
    1  0.12102      0            0            rounded rectangle RoundRectXSec_Radius=0.2 RoundedRect_Height=3.6109 RoundedRect_Width=4.2367
    2  0.27641      0            -0.027027    rounded rectangle RoundRectXSec_Radius=0.2 RoundedRect_Height=6.0014 RoundedRect_Width=4.4767
    3  0.41056      0            -0.027027    rounded rectangle RoundRectXSec_Radius=0.2 RoundedRect_Height=5.7816 RoundedRect_Width=4.4767
    4  0.54438      0            0            rounded rectangle RoundRectXSec_Radius=0.2 RoundedRect_Height=3.6155 RoundedRect_Width=3.043
    5  0.7685       0            0            rounded rectangle RoundRectXSec_Radius=0.2 RoundedRect_Height=2.7762 RoundedRect_Width=1.8232
    6  1            0            0            rounded rectangle RoundRectXSec_Radius=0.2 RoundedRect_Height=1.6477 RoundedRect_Width=0.68571

Propeller "PropGeom", child of "FuselageGeom"
  location (X Y Z) 0 0 0, rotation 0 0 0
  bounding box size 0.412698 8.02632 2.85685
  mass: Density=0 Shell_Flag=0 Mass_Area=1 Mass_Prior=0
  Design: Diameter=8.182 NumBlade=2 Beta34=20 UseBeta34Flag=1 Feather=0 Rotate=-15.3846 Precone=0 ReverseFlag=0 FoldAngle=0 PropMode=0 AF=149.288 CLi=0.524046 Chord=0.173625 Solidity=0.110533 ConstructXoC=0.5 FeatherAxisXoC=0.5 FeatherOffsetXoC=0
  cross sections:
    n  RadiusFrac  shape
    0  0           NACA 16-series Chord=0.32728 IdealCl=0 ThickChord=0.5
    1  1           NACA 16-series Chord=0.53183 IdealCl=0.2 ThickChord=0.03
  Chord along r/R (cubic Bezier): 0: 0.08, 0.2: 0.15, 0.4: 0.2, 0.6: 0.2, 0.716667: 0.2, 0.833333: 0.2, 0.95: 0.2, 0.966667: 0.2, 0.983333: 0.2, 1: 0.13
  Twist along r/R (PCHIP): 0: 46.75, 0.75: 20, 1: 13
  Thick along r/R (cubic Bezier): 0: 0.5, 0.133367: 0.3, 0.266733: 0.225, 0.4001: 0.2, 0.466733: 0.125, 0.533367: 0.115, 0.6: 0.1, 0.733333: 0.075, 0.866667: 0.055, 1: 0.03
  CLI along r/R (cubic Bezier): 0: 0, 0.133367: 0.7, 0.266733: 0.7, 0.4001: 0.7, 0.466733: 0.7, 0.533367: 0.7, 0.6: 0.7, 0.733333: 0.7, 0.866667: 0.7, 1: 0.2

Custom "Cone", child of "PropGeom"
  location (X Y Z) 0 0 0, rotation -180 0 -180; relative location 0 0 0, rotation 0 180 0
  bounding box size 0.70095 0.90095 0.90095
  mass: Density=0 Shell_Flag=0 Mass_Area=1 Mass_Prior=0
  Design: Diameter=0.90095 Height=0.70095
  custom script Cone0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

Wing "MainWing", child of "FuselageGeom"
  location (X Y Z) 6.5405 0 -3.7297, rotation 0 0 0
  symmetric about XZ
  bounding box size 4.8315 35.9998 0.783334
  mass: Density=4.9042 Shell_Flag=0 Mass_Area=1 Mass_Prior=1
  totals: TotalSpan=35.9998 TotalProjectedSpan=35.9998 TotalChord=4.44117 TotalArea=159.881 TotalAR=8.10592 MAC=4.49072
  root: chord 4.7634, twist 0, NACA 4-series Camber=0.04 CamberLoc=0.4 ThickChord=0.15
  sections:
    n  Span     Root_Chord  Tip_Chord  Area     Sweep     Sweep_Location  Dihedral  Twist  Twist_Location  tip airfoil
    1  8.99995  4.7634      4.8315     43.1768  -0.36844  0               0         0      0.25            NACA 4-series Camber=0 CamberLoc=0.2 ThickChord=0.1
    2  8.99995  4.8315      3.3383     36.7639  3.5784    0               0         0      0.25            as above

Wing "HorzTail", child of "FuselageGeom"
  location (X Y Z) 22.6892 0 0, rotation 0 0 0
  symmetric about XZ
  bounding box size 4.35232 12.4042 0.522515
  mass: Density=1.1017 Shell_Flag=0 Mass_Area=1 Mass_Prior=1
  totals: TotalSpan=12.4042 TotalProjectedSpan=12.4042 TotalChord=3.80052 TotalArea=47.1422 TotalAR=3.26381 MAC=3.82722
  root: chord 4.35232, twist 0, NACA 4-series Camber=0 CamberLoc=0.2 ThickChord=0.12
  sections:
    n  Span     Root_Chord  Tip_Chord  Area     Sweep   Sweep_Location  Dihedral  Twist  Twist_Location  tip airfoil
    1  6.20208  4.35232     3.24871    23.5711  6.7339  0               0         0      0.25            NACA 4-series Camber=0 CamberLoc=0.2 ThickChord=0.1

Wing "VertTail", child of "FuselageGeom"
  location (X Y Z) 22.3784 0 -0.7027, rotation -90 0 0
  bounding box size 6.9905 0.464514 4.92231
  mass: Density=2.2768 Shell_Flag=0 Mass_Area=1 Mass_Prior=1
  totals: TotalSpan=4.92231 TotalProjectedSpan=4.92231 TotalChord=3.60361 TotalArea=17.7381 TotalAR=1.36594 MAC=3.70343
  root: chord 4.64245, twist 0, NACA 4-series Camber=0 CamberLoc=0.2 ThickChord=0.1
  sections:
    n  Span     Root_Chord  Tip_Chord  Area     Sweep    Sweep_Location  Dihedral  Twist  Twist_Location  tip airfoil
    1  4.92231  4.64245     2.56477    17.7381  41.9592  0               0         0      0.25            as above

BodyOfRevolution "Right Wheel", child of "FuselageGeom"
  location (X Y Z) 8.81 -5.2381 4.048, rotation 0 0 90
  bounding box size 3 1 3
  mass: Density=6.2945 Shell_Flag=0 Mass_Area=1 Mass_Prior=1
  Design: A0=3.14159 Ae=3.14159 Amin=0.785398 AminW=0.25 Angle=0 Diameter=2 Mode=0
  profile: circle Circle_Diameter=1

BodyOfRevolution "Left Wheel", child of "FuselageGeom"
  location (X Y Z) 8.8095 4.2968 4.0478, rotation 0 0 90
  bounding box size 3 1 3
  mass: Density=6.2943 Shell_Flag=0 Mass_Area=1 Mass_Prior=1
  Design: A0=3.14159 Ae=3.14159 Amin=0.785398 AminW=0.25 Angle=0 Diameter=2 Mode=0
  profile: circle Circle_Diameter=1

BodyOfRevolution "Nose Wheel", child of "FuselageGeom"
  location (X Y Z) 3.0952 -0.47619 4.048, rotation 0 0 90
  bounding box size 3 1 3
  mass: Density=3.147 Shell_Flag=0 Mass_Area=1 Mass_Prior=1
  Design: A0=3.14159 Ae=3.14159 Amin=0.785398 AminW=0.25 Angle=0 Diameter=2 Mode=0
  profile: circle Circle_Diameter=1

Custom "Main Gear Strut L", child of "FuselageGeom"
  location (X Y Z) 8.8095 4.7619 4.2857, rotation -180 -88.75 38.7405; relative location 8.8095 4.7619 4.2857, rotation 0 -91.25 -141.26
  bounding box size 0.86025 3.91726 4.65223
  mass: Density=11.5555 Shell_Flag=0 Mass_Area=1 Mass_Prior=0
  Design: Height=0.75928 Length=5.3756 SquareFlag=0 Width=0.70929
  custom script Box1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

Custom "Main Gear Strut R", child of "FuselageGeom"
  location (X Y Z) 8.81 -4.5235 4.286, rotation -180 -88.75 -35.9733; relative location 8.81 -4.5235 4.286, rotation 0 -91.25 144.027
  bounding box size 0.847093 3.20855 4.06206
  mass: Density=11.95 Shell_Flag=0 Mass_Area=1 Mass_Prior=0
  Design: Height=0.759 Length=4.4854 SquareFlag=0 Width=0.709
  custom script Box1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

Custom "Nose Strut", child of "FuselageGeom"
  location (X Y Z) 3.0952 0 3.3333, rotation 0 90 0
  bounding box size 0.65095 0.56763 2.2509
  mass: Density=43.3836 Shell_Flag=0 Mass_Area=1 Mass_Prior=0
  Design: Height=0.65095 Length=2.2509 SquareFlag=0 Width=0.56763
  custom script Box1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

Custom "Wing Strut R", child of "FuselageGeom"
  location (X Y Z) 6.7857 -1.6667 1.4286, rotation -60 90 0; relative location 6.7857 -1.6667 1.4286, rotation 0 90 -60
  bounding box size 0.32598 9.01918 5.37138
  mass: Density=0 Shell_Flag=0 Mass_Area=1 Mass_Prior=0
  Design: Height=0.32598 Length=10.2503 SquareFlag=0 Width=0.28432
  custom script Box1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

Custom "Wing Strut L", child of "FuselageGeom"
  location (X Y Z) 6.786 1.667 1.429, rotation 60 90 0; relative location 6.786 1.667 1.429, rotation 0 90 60
  bounding box size 0.326 9.01876 5.37095
  mass: Density=0 Shell_Flag=0 Mass_Area=1 Mass_Prior=0
  Design: Height=0.326 Length=10.25 SquareFlag=0 Width=0.284
  custom script Box1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

Human "FrontHumans", child of "FuselageGeom"
  location (X Y Z) 7.2414 1.0345 -0.82192, rotation 180 0 0
  symmetric about XZ
  bounding box size 2.30768 4.14084 4.56262
  mass: Density=0 Shell_Flag=0 Mass_Area=1 Mass_Prior=0
  Anthropometric: Age=30 AutoDensity=0 BMI=27.6997 BMI_pct=0.499975 GenderFlag=0 LenUnit=4 Mass=180.326 MassUnit=3 SitFrac=0.45977 Stature=5.6378 Stature_pct=0.305024 Volume=2.58721

Custom "FrontHumanBox", child of "FrontHumans"
  location (X Y Z) 5.2174 0 -0.76087, rotation 0 0 0
  bounding box size 2.6599 4.4053 4.6097
  mass: Density=5.4594 Shell_Flag=0 Mass_Area=1 Mass_Prior=1
  Design: Height=4.6097 Length=2.6599 SquareFlag=0 Width=4.4053
  custom script Box1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

Human "RearHumans", child of "FrontHumanBox"
  location (X Y Z) 10.0747 1.0345 -0.82192, rotation 180 0 0
  symmetric about XZ
  bounding box size 2.30768 4.14084 4.56262
  mass: Density=0 Shell_Flag=0 Mass_Area=1 Mass_Prior=0
  Anthropometric: Age=30 AutoDensity=0 BMI=27.6997 BMI_pct=0.499975 GenderFlag=0 LenUnit=4 Mass=180.326 MassUnit=3 SitFrac=0.45977 Stature=5.6378 Stature_pct=0.305024 Volume=2.58721

Custom "RearHumanBox", child of "RearHumans"
  location (X Y Z) 8.0507 0 -0.76087, rotation 0 0 0
  bounding box size 2.6599 4.4053 4.6097
  mass: Density=5.4588 Shell_Flag=0 Mass_Area=1 Mass_Prior=1
  Design: Height=4.6097 Length=2.6599 SquareFlag=0 Width=4.4053
  custom script Box1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

Custom "Fuel Cell", child of "FuselageGeom"
  location (X Y Z) 6.8478 3.0435 -3.6957, rotation 0 0 0
  symmetric about XZ
  bounding box size 3.1414 11.1401 0.23767
  mass: Density=27.945 Shell_Flag=0 Mass_Area=1 Mass_Prior=2
  Design: Height=0.23767 Length=3.1414 SquareFlag=0 Width=5.0531
  custom script Box1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

Custom "Cargo", child of "FuselageGeom"
  location (X Y Z) 12.1739 0 0.76087, rotation 0 5.4348 0
  bounding box size 5.42865 2.0872 2.61584
  mass: Density=5.2366 Shell_Flag=0 Mass_Area=1 Mass_Prior=1
  Design: Height=2.1281 Length=5.2507 SquareFlag=0 Width=2.0872
  custom script Box1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

Custom "Engine", child of "FuselageGeom"
  location (X Y Z) 0.97826 0 0, rotation 0 0 0
  bounding box size 3.0008 2.7054 2.1281
  mass: Density=29.9134 Shell_Flag=0 Mass_Area=1 Mass_Prior=1
  Design: Height=2.1281 Length=3.0008 SquareFlag=0 Width=2.7054
  custom script Box1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

Custom "OtherPlaceholder", child of "FuselageGeom"
  location (X Y Z) 21.5897 0 0.54348, rotation 0 0 0
  bounding box size 1 1 1
  mass: Density=290.615 Shell_Flag=0 Mass_Area=1 Mass_Prior=1
  Design: Height=1 Length=1 SquareFlag=0 Width=1
  custom script Box1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
