OpenVSP model (file version 5), 7 components.
Geometry view with OpenVSP parameter names; values to 6 digits, angles in degrees, lengths in the model's unit.
Overall bounding box: X_Min=0 X_Len=43.2748 Y_Min=-12.6244 Y_Len=25.2488 Z_Min=-1.0454 Z_Len=10.1248

Fuselage "FuselageGeom"
  location (X Y Z) 0 0 0, rotation 0 0 0
  bounding box size 42.4095 3.38306 4.02562
  Design: Length=42.4095
  cross sections:
    n  XLocPercent  YLocPercent  ZLocPercent  shape
    0  0            0            0            point
    1  0.067623     0            0.00409836   ellipse Ellipse_Height=1.80982 Ellipse_Width=1.93878
    2  0.149842     0            0.00869222   edit curve Width=2.76202 Height=2.62373 AbsoluteFlag=0 SymType=1 PCHIP points (X Y): 0.5 0, 0.380662 -0.388356, 0 -0.5, -0.380662 -0.388356, -0.5 0, -0.397675 0.396575, 0 0.5, 0.397675 0.396575, 0.5 0
    3  0.25         0            0.0169057    edit curve Width=3.29318 Height=3.40953 AbsoluteFlag=0 SymType=1 PCHIP points (X Y): 0.5 0, 0.380662 -0.388356, 0 -0.5, -0.380662 -0.388356, -0.5 0, -0.397675 0.396575, 0 0.5, 0.397675 0.396575, 0.5 0
    4  0.5          0            0.0251025    edit curve Width=3.36399 Height=3.83129 AbsoluteFlag=0 SymType=1 PCHIP points (X Y): 0.5 0, 0.380662 -0.388356, 0 -0.5, -0.380662 -0.388356, -0.5 0, -0.397675 0.396575, 0 0.5, 0.397675 0.396575, 0.5 0
    5  0.75         0            0.0245902    edit curve Width=2.01823 Height=2.87917 AbsoluteFlag=0 SymType=1 PCHIP points (X Y): 0.5 0, 0.380662 -0.388356, 0 -0.5, -0.380662 -0.388356, -0.5 0, -0.397675 0.396575, 0 0.5, 0.397675 0.396575, 0.5 0
    6  1            0            0.0266393    edit curve Width=0.24527 Height=1.89245 AbsoluteFlag=0 SymType=1 PCHIP points (X Y): 0.5 0, 0.380662 -0.388356, 0 -0.5, -0.380662 -0.388356, -0.5 0, -0.397675 0.396575, 0 0.5, 0.397675 0.396575, 0.5 0

Fuselage "Canopy_Dorsal", child of "FuselageGeom"
  location (X Y Z) 6.47541 0 1.63934, rotation 0 0 0
  bounding box size 35.9286 3.24169 4.1884
  Design: Length=35.9286
  cross sections:
    n  XLocPercent  YLocPercent  ZLocPercent  shape
    0  0            0            0            point
    1  0.25         0            0.0297131    ellipse Ellipse_Height=3 Ellipse_Width=2.95918
    2  0.5          0            0.0179303    ellipse Ellipse_Height=3 Ellipse_Width=2.65419
    3  0.75         0            0.00768443   ellipse Ellipse_Height=2.25799 Ellipse_Width=1.63265
    4  0.875        0            0.00512295   ellipse Ellipse_Height=1.49121 Ellipse_Width=0.902124
    5  1            0            0            ellipse Ellipse_Height=0.797349 Ellipse_Width=0.222492

Wing "wing", child of "FuselageGeom"
  location (X Y Z) 21.761 0 0.280258, rotation 0 0 0
  symmetric about XZ
  bounding box size 11.2217 25.2488 0.448867
  totals: TotalSpan=25.2488 TotalProjectedSpan=25.2488 TotalChord=6.733 TotalArea=170 TotalAR=3.75 MAC=7.73049
  root: chord 11.2217, twist 0, biconvex ThickChord=0.04
  sections:
    n  Span     Root_Chord  Tip_Chord  Area  Sweep  Sweep_Location  Dihedral  Twist  Twist_Location  tip airfoil
    1  12.6244  11.2217     2.24433    85    24     0.25            0         0      0.25            as above

Wing "tail", child of "FuselageGeom"
  location (X Y Z) 35.312 0 0.395656, rotation -9.2 1.6 0
  symmetric about XZ
  bounding box size 7.76896 12.7825 1.55154
  totals: TotalSpan=12.8988 TotalProjectedSpan=12.8988 TotalChord=4.57406 TotalArea=59 TotalAR=2.82 MAC=5.31529
  root: chord 7.76331, twist 0, biconvex ThickChord=0.04
  sections:
    n  Span     Root_Chord  Tip_Chord  Area  Sweep  Sweep_Location  Dihedral  Twist  Twist_Location  tip airfoil
    1  6.44942  7.76331     1.3848     29.5  25     0.25            0         0      0.25            as above

Fuselage "inlet_afterbody", child of "FuselageGeom"
  location (X Y Z) -8.309 2.4234 0.41544, rotation -90 0 0
  symmetric about XZ
  bounding box size 26.3039 6.30313 2.33693
  Design: Length=51.5838
  cross sections:
    n  XLocPercent  XRotate  YLocPercent  YRotate  ZLocPercent  ZRotate   shape
    0  0.967391     0        -0.012       0        -0.029       0         circle Circle_Diameter=1.3848
    1  0.831522     0        -0.012       0        -0.0145      0         as above
    2  0.635761     0        -0.007       10.8     -0.014       0         ellipse Ellipse_Height=1.01238 Ellipse_Width=1.5642
    3  0.5          5.72727  -0.003       18.8182  0            -23.7273  general fuselage BotStr=0.83 BotTanAngle=90 CornerRad=0 Height=0.841266 LowStr=0.83 MaxWidthLoc=-0.54 TopStr=0.83 TopTanAngle=90 UpStr=0.83 Width=1.66003
    4  0.575        0        -0.0045      9        -0.001       0         general fuselage BotStr=0.83 BotTanAngle=90 CornerRad=0 Height=1.18967 LowStr=0.83 MaxWidthLoc=-0.545455 TopStr=0.83 TopTanAngle=90 UpStr=0.83 Width=2.02924
    5  0.68875      0        -0.007       0        -0.02        0         rounded rectangle RoundRectXSec_Radius=0.699324 RoundedRect_Height=1.88679 RoundedRect_Width=2.23611
    6  0.8125       0        -0.0095      0        -0.02        0         rounded rectangle RoundRectXSec_Radius=0.83088 RoundedRect_Height=2.63112 RoundedRect_Width=2.11182
    7  0.965        0        -0.012       0        -0.027       0         rounded rectangle RoundRectXSec_Radius=0.7223 RoundedRect_Height=1.9041 RoundedRect_Width=1.731
    8  1            0        -0.012       0        -0.029       0         circle Circle_Diameter=1.5579

Wing "fin", child of "FuselageGeom"
  location (X Y Z) 32.147 0 2, rotation 90 0 0
  bounding box size 9.36122 0.561673 7.07942
  totals: TotalSpan=7.07942 TotalProjectedSpan=7.07942 TotalChord=5.85076 TotalArea=41.42 TotalAR=1.21 MAC=6.55285
  root: chord 9.36122, twist 0, biconvex ThickChord=0.06
  sections:
    n  Span     Root_Chord  Tip_Chord  Area   Sweep  Sweep_Location  Dihedral  Twist  Twist_Location  tip airfoil
    1  7.07942  9.36122     2.3403     41.42  25     0.25            0         0      0.25            as above

Fuselage "inlet_afterbody_CDo", child of "FuselageGeom"
  location (X Y Z) -8.309 2.4234 0.41544, rotation -90 0 0
  symmetric about XZ
  bounding box size 26.3024 6.30313 2.33693
  Design: Length=51.5838
  cross sections:
    n  XLocPercent  XRotate  YLocPercent  YRotate  ZLocPercent  ZRotate   shape
    0  0.5          5.72727  -0.003       18.8182  0            -23.7273  edit curve Width=1.66003 Height=0.841266 AbsoluteFlag=0 SymType=0 cubic Bezier points (X Y): 0.5 -0.27, 0.5 -0.546667, 0.276667 -0.5, 0 -0.5, -0.276667 -0.5, -0.5 -0.546667, -0.5 -0.27, -0.5 0.00666667, -0.276667 0.5, 0 0.5, 0.276667 0.5, 0.5 0.00666667, 0.5 -0.27
    1  0.575        0        -0.0045      9        -0.001       0         general fuselage BotStr=0.83 BotTanAngle=90 CornerRad=0 Height=1.18967 LowStr=0.83 MaxWidthLoc=-0.545455 TopStr=0.83 TopTanAngle=90 UpStr=0.83 Width=2.02924
    2  0.68875      0        -0.007       0        -0.02        0         rounded rectangle RoundRectXSec_Radius=0.699324 RoundedRect_Height=1.88679 RoundedRect_Width=2.23611
    3  0.8125       0        -0.0095      0        -0.02        0         rounded rectangle RoundRectXSec_Radius=0.83088 RoundedRect_Height=2.63112 RoundedRect_Width=2.11182
    4  0.965        0        -0.012       0        -0.027       0         rounded rectangle RoundRectXSec_Radius=0.7223 RoundedRect_Height=1.9041 RoundedRect_Width=1.731
    5  1            0        -0.012       0        -0.029       0         circle Circle_Diameter=1.5579

VSPAERO settings: Sref=170 bref=25.2488 cref=6.733 Xcg=0 Ycg=0 Zcg=0 AlphaStart=-5 AlphaEnd=12 AlphaNpts=18 BetaStart=0 BetaEnd=0 BetaNpts=1 MachStart=0.8 MachEnd=0 MachNpts=1 ReCref=1e+07 Vinf=100 Rho=0.002377
